<?xml version="1.0" ?>
<Lems xmlns="http://www.neuroml.org/lems/0.7.6" xmlns:xsi="http://www.w3.org/2001/XMLSchema-instance" xsi:schemaLocation="http://www.neuroml.org/lems/0.7.6 https://raw.githubusercontent.com/LEMS/LEMS/development/Schemas/LEMS/LEMS_v0.7.6.xsd">
    <Component A11="0.3328" A12="0.1853" A13="0.3328" A21="0.5985" A22="0.3331" A23="0.5985" A31="0.3328" A32="0.1853" A33="0.3328" B11="0.3328" B12="0.5985" B13="0.3328" B21="0.1853" B22="0.3331" B23="0.1853" B31="0.3328" B32="0.5985" B33="0.3328" IE1="1.5102" IE2="1.1180" IE3="2.5070" II1="1.5102" II2="1.1180" II3="2.5070" a1="1.1997" a2="3.8722" a3="1.1997" b1="3.2859" b2="5.9033" b3="3.2859" c1="0.9130" c2="0.5082" c3="0.9130" d1="5.4765" d2="9.8389" d3="5.4765" e1="1.1997" e2="3.8722" e3="1.1997" f1="3.2859" f2="5.9033" f3="3.2859" h1="0.9130" h2="0.5081" h3="0.9130" id="delta_series" p1="5.4765" p2="9.8389" p3="5.4765" r="0.006" s="4" type="SJHM3D"/>
</Lems>
